*Heading
** Job name: valsalva_28mm_IVC_MEDIUM Model name: valsalva_28mm_IVC_MEDIUM
** Generated by: Abaqus/CAE 2016
*Preprint, echo=NO, model=NO, history=NO, contact=NO
**
** PARTS
**
*Part, name=GIVCF_Rev1
*Node
      1,           5.,  0.665000021,          -2.
      2,           5.,   1.01600003,          -2.
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*Element, type=C3D8I
    1,  1589, 10157, 12322, 10887,     1,    61,  1965,    88
    2, 10157, 10158, 12323, 12322,    61,    62,  1966,  1965
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*Nset, nset=filter_top
    57,    58,    59,    60,  1909,  1910
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*Elset, elset=filter_top, generate
 25745,  25984,      1
*Nset, nset=all_filter_geom, generate
     1,  32481,      1
*Elset, elset=all_filter_geom, generate
     1,  25984,      1
*Elset, elset=All, generate
     1,  25984,      1
*Nset, nset=filter_top2
    57,    58,    59,    60,  1848,  1849
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*Elset, elset=_filter_surface_S4, internal, generate
     8,  21184,      8
*Elset, elset=_filter_surface_S6, internal, generate
     1,  21177,      8
*Elset, elset=_filter_surface_S3, internal
   129,   130,   131,   132,   133,   134
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*Elset, elset=_filter_surface_S5, internal
   185,   186,   187,   188,   189,   190
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*Elset, elset=_filter_surface_S1, internal, generate
 21121,  21184,      1
*Surface, type=ELEMENT, name=filter_surface
_filter_surface_S4, S4
_filter_surface_S6, S6
_filter_surface_S3, S3
_filter_surface_S5, S5
_filter_surface_S1, S1
** Section: nitinol_SE508
*Solid Section, elset=All, material=ABQ_SUPER_ELASTIC_PLASTIC_SE508
,
*End Part
**
*Part, name=IVC
*End Part
**
*Part, name=sheath
*End Part
**
**
** ASSEMBLY
**
*Assembly, name=Assembly
**
*Instance, name=sheath, part=sheath
         0.5,           0.,           0.
         0.5,           0.,           0.,          0.5,           0.,           1.,          90.
*Node
      1,           0.,        -12.5,           0.
*Nset, nset=sheath-RefPt_, internal
1,
*Surface, type=REVOLUTION, name=sheath_surface
START,          4.2, -10.3824034027761
 CIRCL,           3., -9.82071421427143,          4.4, -8.39242852856286
 CIRCL,          1.5,        -6.25,          6.5,        -6.25
 LINE,          1.5,        53.75
*Rigid Body, ref node=sheath-RefPt_, analytical surface=sheath_surface
*End Instance
**
*Instance, name=strut_generic_IVCF, part=GIVCF_Rev1
          0., -0.390180644032257, 1.96157056080646
          0., -0.390180644032257, 1.96157056080646,           1., -0.390180644032257, 1.96157056080646, 11.2500001817377
*End Instance
**
*Instance, name=IVC, part=IVC
         25.,           0.,           0.
         25.,           0.,           0.,          25.,  3.06161706478674e-17,           1.,          90.
*Node
      1,           0.,           0.,           0.
*Nset, nset=IVC-RefPt_, internal
1,
*Surface, type=CYLINDER, name=IVC_surf
START,          14.,         -25.
 LINE,          14.,          25.
*Rigid Body, ref node=IVC-RefPt_, analytical surface=IVC_surf
*End Instance
**
*Nset, nset=RP_IVC, instance=IVC
 1,
*Nset, nset=RP_sheath, instance=sheath
 1,
*End Assembly
**
** MATERIALS
**
*Material, name=ABQ_SUPER_ELASTIC_N3D
*Density
 6.5e-08,
*Depvar
     24,
*User Material, constants=15
40000.,  0.33,32000.,  0.33, 0.041,   6.7,  440.,  540.
   22.,   6.7,  250.,  140.,    0., 0.041,    0.
*Material, name=ABQ_SUPER_ELASTIC_PLASTIC_SE508
*Density
 6.5e-08,
*Depvar
     31,
*User Material, constants=30, unsymm
61779.,  0.33,29737.,  0.33, 0.035,   6.2,  383.,  430.
   37.,   8.5,  202.,  170.,  383.,    0.,    0.,    6.
  972., 0.074, 1076., 0.078, 1144., 0.084, 1230., 0.094
 1285., 0.108, 1311., 0.116, 1334., 0.137
*Material, name=ABQ_SUPER_ELASTIC_SE508
*Density
 6.5e-08,
*Depvar
     24,
*User Material, constants=15, unsymm
61779.,  0.33,29737.,  0.33, 0.035,   6.2,  383.,  430.
   37.,   8.5,  202.,  170.,  383.,    0.,    0.
**
** INTERACTION PROPERTIES
**
*Surface Interaction, name=_filter_vein_quasi_static-Prop
1.,
*Friction, slip tolerance=0.005
 0.02,
*Surface Behavior, penalty
, , 0.001
*Surface Interaction, name=filter_vein_high_friction
1.,
*Friction, slip tolerance=0.005
 0.2,
*Surface Behavior, penalty
, , 0.001
*Surface Interaction, name=sheath--filter
1.,
*Friction, slip tolerance=0.005
 0.02,
*Surface Behavior, penalty
, , 0.001
**
** BOUNDARY CONDITIONS
**
** Name: fix_filter Type: Displacement/Rotation
*Boundary
strut_generic_IVCF.filter_top2, 1, 1
strut_generic_IVCF.filter_top2, 2, 2
strut_generic_IVCF.filter_top2, 3, 3
** Name: move_sheath Type: Displacement/Rotation
*Boundary
RP_sheath, 1, 1
RP_sheath, 2, 2
RP_sheath, 3, 3
RP_sheath, 4, 4
RP_sheath, 5, 5
RP_sheath, 6, 6
** Name: move_vein Type: Displacement/Rotation
*Boundary
RP_IVC, 1, 1
RP_IVC, 2, 2
RP_IVC, 3, 3
RP_IVC, 4, 4
RP_IVC, 5, 5
RP_IVC, 6, 6
**
** PREDEFINED FIELDS
**
** Name: initial_temperature   Type: Temperature
*Initial Conditions, type=TEMPERATURE
strut_generic_IVCF.all_filter_geom, 37.
**
** INTERACTIONS
**
** Interaction: filter_vein_quasi_static
*Contact Pair, interaction=_filter_vein_quasi_static-Prop, type=SURFACE TO SURFACE
strut_generic_IVCF.filter_surface, IVC.IVC_surf
** Interaction: sheath_filter_quasi_static
*Contact Pair, interaction=sheath--filter
strut_generic_IVCF.filter_surface, sheath.sheath_surface
** ----------------------------------------------------------------
**
** STEP: sheath_filter_quasi_static
**
*Step, name=sheath_filter_quasi_static, nlgeom=YES, inc=10000, unsymm=YES
*Dynamic
0.01,1.,1e-10,0.01
**
** BOUNDARY CONDITIONS
**
** Name: move_sheath Type: Displacement/Rotation
*Boundary
RP_sheath, 1, 1, 50.
**
** INTERACTIONS
**
** Interaction: filter_vein_quasi_static
*Model Change, type=CONTACT PAIR, remove
strut_generic_IVCF.filter_surface, IVC.IVC_surf
**
** OUTPUT REQUESTS
**
*Restart, write, frequency=0
**
** FIELD OUTPUT: F-Output-2
**
*Output, field, time interval=0.01, time marks=NO
*Node Output
A, CF, RF, U, V
*Element Output, directions=YES
IVOL, LE, PE, PEEQ, PEMAG, S
*Contact Output
CDISP, CFORCE, CNAREA, CSTATUS, CSTRESS
**
** HISTORY OUTPUT: H-Output-2
**
*Output, history, time interval=0.01, time marks=NO
*Energy Output
ALLAE, ALLCD, ALLDMD, ALLEE, ALLFD, ALLIE, ALLJD, ALLKE, ALLKL, ALLPD, ALLQB, ALLSD, ALLSE, ALLVD, ALLWK, ETOTAL
*Contact Output
CAREA, CFNM
*End Step
** ----------------------------------------------------------------
**
** STEP: unsheath_quasi_static
**
*Step, name=unsheath_quasi_static, nlgeom=YES, inc=100000, unsymm=YES
*Dynamic,application=QUASI-STATIC,initial=NO
0.01,1.,1e-10,0.01
**
** BOUNDARY CONDITIONS
**
** Name: move_sheath Type: Displacement/Rotation
*Boundary
RP_sheath, 1, 1
**
** INTERACTIONS
**
** Interaction: filter_vein_quasi_static
*Model Change, type=CONTACT PAIR, add
strut_generic_IVCF.filter_surface, IVC.IVC_surf
**
** OUTPUT REQUESTS
**
*Restart, write, frequency=0
**
** FIELD OUTPUT: F-Output-2
**
*Output, field, time interval=0.01, time marks=NO
*Node Output
A, CF, RF, U, V
*Element Output, directions=YES
IVOL, LE, PE, PEEQ, PEMAG, S
*Contact Output
CDISP, CFORCE, CNAREA, CSTATUS, CSTRESS
**
** HISTORY OUTPUT: H-Output-2
**
*Output, history, time interval=0.01, time marks=NO
*Energy Output
ALLAE, ALLCD, ALLDMD, ALLEE, ALLFD, ALLIE, ALLJD, ALLKE, ALLKL, ALLPD, ALLQB, ALLSD, ALLSE, ALLVD, ALLWK, ETOTAL
*Contact Output
CAREA, CFNM
*End Step
** ----------------------------------------------------------------
**
** STEP: valsalva1
**
*Step, name=valsalva1, nlgeom=YES, inc=10000, unsymm=YES
*Dynamic
0.01,1.,1e-10,0.01
**
** BOUNDARY CONDITIONS
**
** Name: fix_filter Type: Displacement/Rotation
*Boundary, op=NEW
strut_generic_IVCF.filter_top2, 2, 2
strut_generic_IVCF.filter_top2, 3, 3
strut_generic_IVCF.filter_top2, 4, 4
strut_generic_IVCF.filter_top2, 5, 5
strut_generic_IVCF.filter_top2, 6, 6
** Name: move_sheath Type: Displacement/Rotation
*Boundary, op=NEW
RP_sheath, 1, 1
RP_sheath, 2, 2
RP_sheath, 3, 3
RP_sheath, 4, 4
RP_sheath, 5, 5
RP_sheath, 6, 6
** Name: move_vein Type: Displacement/Rotation
*Boundary, op=NEW
RP_IVC, 1, 1
RP_IVC, 2, 2, -7.
RP_IVC, 3, 3
RP_IVC, 4, 4
RP_IVC, 5, 5
RP_IVC, 6, 6
**
** INTERACTIONS
**
** Interaction: filter_vein_quasi_static
*Change Friction, interaction=_filter_vein_quasi_static-Prop
*Friction, slip tolerance=0.005
 0.2,
**
** OUTPUT REQUESTS
**
*Restart, write, frequency=0
**
** FIELD OUTPUT: F-Output-2
**
*Output, field, time interval=0.01, time marks=NO
*Node Output
A, CF, RF, U, V
*Element Output, directions=YES
IVOL, LE, PE, PEEQ, PEMAG, S
*Contact Output
CDISP, CFORCE, CNAREA, CSTATUS, CSTRESS
**
** HISTORY OUTPUT: H-Output-2
**
*Output, history, time interval=0.01, time marks=NO
*Energy Output
ALLAE, ALLCD, ALLDMD, ALLEE, ALLFD, ALLIE, ALLJD, ALLKE, ALLKL, ALLPD, ALLQB, ALLSD, ALLSE, ALLVD, ALLWK, ETOTAL
*Contact Output
CAREA, CFNM
*End Step
** ----------------------------------------------------------------
**
** STEP: relax1
**
*Step, name=relax1, nlgeom=YES, inc=10000, unsymm=YES
*Dynamic
0.01,1.,1e-10,0.01
**
** BOUNDARY CONDITIONS
**
** Name: move_vein Type: Displacement/Rotation
*Boundary
RP_IVC, 2, 2
**
** OUTPUT REQUESTS
**
*Restart, write, frequency=0
**
** FIELD OUTPUT: F-Output-2
**
*Output, field, time interval=0.01, time marks=NO
*Node Output
A, CF, RF, U, V
*Element Output, directions=YES
IVOL, LE, PE, PEEQ, PEMAG, S
*Contact Output
CDISP, CFORCE, CNAREA, CSTATUS, CSTRESS
**
** HISTORY OUTPUT: H-Output-2
**
*Output, history, time interval=0.01, time marks=NO
*Energy Output
ALLAE, ALLCD, ALLDMD, ALLEE, ALLFD, ALLIE, ALLJD, ALLKE, ALLKL, ALLPD, ALLQB, ALLSD, ALLSE, ALLVD, ALLWK, ETOTAL
*Contact Output
CAREA, CFNM
*End Step
** ----------------------------------------------------------------
**
** STEP: valsalva2
**
*Step, name=valsalva2, nlgeom=YES, inc=10000, unsymm=YES
*Dynamic
0.01,1.,1e-10,0.01
**
** BOUNDARY CONDITIONS
**
** Name: move_vein Type: Displacement/Rotation
*Boundary
RP_IVC, 2, 2, -7.
**
** OUTPUT REQUESTS
**
*Restart, write, frequency=0
**
** FIELD OUTPUT: F-Output-2
**
*Output, field, time interval=0.01, time marks=NO
*Node Output
A, CF, RF, U, V
*Element Output, directions=YES
IVOL, LE, PE, PEEQ, PEMAG, S
*Contact Output
CDISP, CFORCE, CNAREA, CSTATUS, CSTRESS
**
** HISTORY OUTPUT: H-Output-2
**
*Output, history, time interval=0.01, time marks=NO
*Energy Output
ALLAE, ALLCD, ALLDMD, ALLEE, ALLFD, ALLIE, ALLJD, ALLKE, ALLKL, ALLPD, ALLQB, ALLSD, ALLSE, ALLVD, ALLWK, ETOTAL
*Contact Output
CAREA, CFNM
*End Step
** ----------------------------------------------------------------
**
** STEP: relax2
**
*Step, name=relax2, nlgeom=YES, inc=10000, unsymm=YES
*Dynamic
0.01,1.,1e-10,0.01
**
** BOUNDARY CONDITIONS
**
** Name: move_vein Type: Displacement/Rotation
*Boundary
RP_IVC, 2, 2
**
** OUTPUT REQUESTS
**
*Restart, write, frequency=0
**
** FIELD OUTPUT: F-Output-2
**
*Output, field, time interval=0.01, time marks=NO
*Node Output
A, CF, RF, U, V
*Element Output, directions=YES
IVOL, LE, PE, PEEQ, PEMAG, S
*Contact Output
CDISP, CFORCE, CNAREA, CSTATUS, CSTRESS
**
** HISTORY OUTPUT: H-Output-2
**
*Output, history, time interval=0.01, time marks=NO
*Energy Output
ALLAE, ALLCD, ALLDMD, ALLEE, ALLFD, ALLIE, ALLJD, ALLKE, ALLKL, ALLPD, ALLQB, ALLSD, ALLSE, ALLVD, ALLWK, ETOTAL
*Contact Output
CAREA, CFNM
*End Step
** ----------------------------------------------------------------
**
** STEP: valsalva3
**
*Step, name=valsalva3, nlgeom=YES, inc=10000, unsymm=YES
*Dynamic
0.01,1.,1e-10,0.01
**
** BOUNDARY CONDITIONS
**
** Name: move_vein Type: Displacement/Rotation
*Boundary
RP_IVC, 2, 2, -7.
**
** OUTPUT REQUESTS
**
*Restart, write, frequency=0
**
** FIELD OUTPUT: F-Output-2
**
*Output, field, time interval=0.01, time marks=NO
*Node Output
A, CF, RF, U, V
*Element Output, directions=YES
IVOL, LE, PE, PEEQ, PEMAG, S
*Contact Output
CDISP, CFORCE, CNAREA, CSTATUS, CSTRESS
**
** HISTORY OUTPUT: H-Output-2
**
*Output, history, time interval=0.01, time marks=NO
*Energy Output
ALLAE, ALLCD, ALLDMD, ALLEE, ALLFD, ALLIE, ALLJD, ALLKE, ALLKL, ALLPD, ALLQB, ALLSD, ALLSE, ALLVD, ALLWK, ETOTAL
*Contact Output
CAREA, CFNM
*End Step
** ----------------------------------------------------------------
**
** STEP: relax3
**
*Step, name=relax3, nlgeom=YES, inc=10000, unsymm=YES
*Dynamic
0.01,1.,1e-10,0.01
**
** BOUNDARY CONDITIONS
**
** Name: move_vein Type: Displacement/Rotation
*Boundary
RP_IVC, 2, 2
**
** OUTPUT REQUESTS
**
*Restart, write, frequency=0
**
** FIELD OUTPUT: F-Output-2
**
*Output, field, time interval=0.01, time marks=NO
*Node Output
A, CF, RF, U, V
*Element Output, directions=YES
IVOL, LE, PE, PEEQ, PEMAG, S
*Contact Output
CDISP, CFORCE, CNAREA, CSTATUS, CSTRESS
**
** HISTORY OUTPUT: H-Output-2
**
*Output, history, time interval=0.01, time marks=NO
*Energy Output
ALLAE, ALLCD, ALLDMD, ALLEE, ALLFD, ALLIE, ALLJD, ALLKE, ALLKL, ALLPD, ALLQB, ALLSD, ALLSE, ALLVD, ALLWK, ETOTAL
*Contact Output
CAREA, CFNM
*End Step
